// SBML level 3 version 1
// Exported by VCell 7.3

model __example_biosim_vilar_ODE_deterministic()
  // --example-biosim-vilar_ODE deterministic
  // model units - substance: molecules, time: s, volume: um3, area: um2, length: um, extent: molecules

  // Compartments:
  compartment cell = 4.18879 um3;
  compartment EC = 8 um3;
  compartment PM = 12.56637 um2;  // 2-D

  // Species:
  substanceOnly species mRNA_R in cell = 0;
  substanceOnly species A in cell = 0;
  substanceOnly species R in cell = 0;
  substanceOnly species PrmA in cell = 2522.549*KMOLE/cell;
  substanceOnly species PrmR in cell = 2522.549*KMOLE/cell;
  substanceOnly species C in cell = 0;
  substanceOnly species PrmA_bound in cell = 0;
  substanceOnly species PrmR_bound in cell = 0;
  substanceOnly species mRNA_A_ in cell = 0;

  // Parameters:
  common_delta_A = 1 s_1;
  _T_ = 300 K;
  _PI_ = 3.141593 _one_;
  _F_ = 9.64853321e4 C_mol_1;
  _F_nmol_ = 9.64853321e-5 C_nmol_1;
  _N_pmol_ = 6.02214179e11 molecules_pmol_1;
  _K_GHK_ = 1e-9 _one_000000000;
  _R_ = 8314.463 mV_C_K_1_mol_1;
  K_millivolts_per_volt = 1000 mV_V_1;
  KMOLE = 0.001660539 uM_um3_molecules_1;
  Kr_C_decay = 0 s_1;
  Kf_C_decay has s_1;
  Kf_A_decay has s_1;
  Kf_mRNA_A_decay = 10 s_1;
  Kf_mRNA_R_decay = 0.5 s_1;
  Kr_AR_binding = 0 s_1;
  Kf_AR_binding has um3_s_1_molecules_1;
  delta_R_R_decay = 0.2 s_1;
  Kf_R_decay has s_1;
  Kr_A_trnscr = 0 um3_s_1_molecules_1;
  alphaA_A_trnscr = 50 s_1;
  Kf_A_trnscr has s_1;
  Kr_active_A_trnscr = 0 um3_s_1_molecules_1;
  alphaA_prmbound_active_A_trnscr = 500 s_1;
  Kf_active_A_trnscr has s_1;
  Kr_R_trnsc = 0 um3_s_1_molecules_1;
  alphaR_R_trnsc = 0.01 s_1;
  Kf_R_trnsc has s_1;
  Kr_active_R_trnsc = 0 um3_s_1_molecules_1;
  alphaR_prmbound_active_R_trnsc = 50 s_1;
  Kf_active_R_trnsc has s_1;
  Kr_PrmA_activation = 50 s_1;
  Kf_PrmA_activation has um3_s_1_molecules_1;
  Kr_PrmR_activation = 100 s_1;
  Kf_PrmR_activation has um3_s_1_molecules_1;
  Kr_R_trnsl = 0 um3_s_1_molecules_1;
  betaR_R_trnsl = 5 s_1;
  Kf_R_trnsl has s_1;
  Kr_A_trnsl = 0 um3_s_1_molecules_1;
  betaA_A_trnsl = 50 s_1;
  Kf_A_trnsl has s_1;

  // Assignment rules:
  Kf_C_decay := common_delta_A;
  Kf_A_decay := common_delta_A;
  Kf_AR_binding := 0.003321078/KMOLE;
  Kf_R_decay := delta_R_R_decay;
  Kf_A_trnscr := alphaA_A_trnscr;
  Kf_active_A_trnscr := alphaA_prmbound_active_A_trnscr;
  Kf_R_trnsc := alphaR_R_trnsc;
  Kf_active_R_trnsc := alphaR_prmbound_active_R_trnsc;
  Kf_PrmA_activation := 0.001660539/KMOLE;
  Kf_PrmR_activation := 0.001660539/KMOLE;
  Kf_R_trnsl := betaR_R_trnsl;
  Kf_A_trnsl := betaA_A_trnsl;

  // Reactions:
  C_decay: C -> R; (C*Kf_C_decay - Kr_C_decay*R)*cell;
  A_decay: A -> ; A*Kf_A_decay*cell;
    A_decay_Kr = 0 molecules_um_3_s_1;
  mRNA_A_decay: mRNA_A_ -> ; Kf_mRNA_A_decay*mRNA_A_*cell;
    mRNA_A_decay_Kr = 0 molecules_um_3_s_1;
  mRNA_R_decay: mRNA_R -> ; Kf_mRNA_R_decay*mRNA_R*cell;
    mRNA_R_decay_Kr = 0 molecules_um_3_s_1;
  AR_binding: A + R -> C; (-(C*Kr_AR_binding) + A*Kf_AR_binding*R)*cell;
  R_decay: R -> ; Kf_R_decay*R*cell;
    R_decay_Kr = 0 molecules_um_3_s_1;
  A_trnscr: PrmA -> mRNA_A_ + PrmA; (Kf_A_trnscr*PrmA - Kr_A_trnscr*PrmA*mRNA_A_)*cell;
  active_A_trnscr: PrmA_bound -> mRNA_A_ + PrmA_bound; (Kf_active_A_trnscr*PrmA_bound - Kr_active_A_trnscr*PrmA_bound*mRNA_A_)*cell;
  R_trnsc: PrmR -> mRNA_R + PrmR; (Kf_R_trnsc*PrmR - Kr_R_trnsc*PrmR*mRNA_R)*cell;
  active_R_trnsc: PrmR_bound -> mRNA_R + PrmR_bound; (Kf_active_R_trnsc*PrmR_bound - Kr_active_R_trnsc*PrmR_bound*mRNA_R)*cell;
  PrmA_activation: PrmA + A -> PrmA_bound; (A*Kf_PrmA_activation*PrmA - Kr_PrmA_activation*PrmA_bound)*cell;
  PrmR_activation: PrmR + A -> PrmR_bound; (A*Kf_PrmR_activation*PrmR - Kr_PrmR_activation*PrmR_bound)*cell;
  R_trnsl: mRNA_R -> mRNA_R + R; (Kf_R_trnsl*mRNA_R - Kr_R_trnsl*R*mRNA_R)*cell;
  A_trnsl: mRNA_A_ -> A + mRNA_A_; (Kf_A_trnsl*mRNA_A_ - A*Kr_A_trnsl*mRNA_A_)*cell;

  // Unit definitions:
  unit molecules = item;
  unit um3 = (1e-6 metre)^3;
  unit um2 = (1e-6 metre)^2;
  unit um = 1e-6 metre;
  unit s = second;
  unit s_1 = 1 / second;
  unit K = kelvin;
  unit _one_ = dimensionless;
  unit C_mol_1 = coulomb / mole;
  unit C_nmol_1 = coulomb / (1e-9 mole);
  unit molecules_pmol_1 = item / (1e-12 mole);
  unit _one_000000000 = 1e9 dimensionless;
  unit mV_C_K_1_mol_1 = 1e-3 volt * coulomb / (kelvin * mole);
  unit mV_V_1 = dimensionless;
  unit uM_um3_molecules_1 = 1e-6 mole * (1e-6 metre)^3 / (litre * item);
  unit molecules_um_3_s_1 = item / ((1e-6 metre)^3 * second);
  unit um3_s_1_molecules_1 = (1e-6 metre)^3 / (second * item);
end
